# PENG-ROBINSON EQUATION OF STATE MIXTURE CALCULATION  File: thermomix2.mcd
# The matrices below are for the user to enter in data for critical conditions, omega and heat capacity. Additional rows can be made for more than two components.  Note that the first column in the the heat capacity matrix does matter as it is ignored and only 1-4 (ignoring column 0) are used.  The heat capacity constants must be in the form of a power series in Temperature from 0 to 3.
#
# Units: Tc in K, Pc in bar, CP in J/molK
# Input number of components, N
N := 2
i := 0 .. N - 1
j := 0 .. N - 1  # Input critical properties of octanol and water
# Manually set reference temperature and pressure here
Trs := 90
Prs := 1
# Gas constant in units of m^3....?
R := 0.00008314
# Read pure component properties
Tc := [748.4; 304.2]
Pc := [40.5; 73.76]
om := [.302; .225]
# Peng-Robinson Constants:
kap[i] := 0.37464 + 1.54226*om[i] - 0.26992*om[i]*om[i]
b[i] := 0.07780*R*Tc[i]/Pc[i]
ac[i] := 0.45724*R^2*Tc[i]^2/Pc[i]
# Input temperature and pressure of calculation
# ,
T := 333.4
# K,
P := 108.4  # bar  # This will be our optimal temperature as determined in part 2
# Put in code from Lect 11 flash to find the vapor liquid split, compositions at this optimal temp
# Will need to run this code twice: once with the compositions of our liquid phase, the other with our compositions of vapor phase. Then, add the resulting enthalpies from both. Use lecture 11 gf to find compositions of each stream
#
# Two possibilities: copy and paste this code again, basically have twice the amount of text, or try to expand this function to one more dimension
a(T, i) := ac[i]*(1 + kap[i]*(1 - sqrt(T/Tc[i])))^2
# Input compositions
x[0] := .7
x[1] := 0.3
Cpm[1] := sum(x[i]*Cp[i, 1], i = 0 .. N - 1)
Cpm[2] := sum(x[i]*Cp[i, 2], i = 0 .. N - 1)
Cpm[3] := sum(x[i]*Cp[i, 3], i = 0 .. N - 1)
Cpm[4] := sum(x[i]*Cp[i, 4], i = 0 .. N - 1)
# Above this, must define expressions for Cp of octanol (i=1)
# and Cp of ethanol (i=2). Cpm1, Cp2, etc refer to the coefficients next to the
# temperature exponent
# Input of  binary interaction parameters
k[0, 1] := 0.103
k[1, 0] := 0.103
k = [0, 0.103; 0.103, 0]
# Mixing and
# combining rules
bm(x) := sum(x[i]*b[i], i = 0 .. N - 1)
am(T, x) := sum(sum(x[i]*x[j]*(1 - k[i, j])*sqrt(a(T, i)*a(T, j)), j = 0 .. N - 1), i = 0 .. N - 1)
A(x) := am(T, x)*P/(R*T)^2
B(x) := P*bm(x)/(R*T)
Da(x) := d/dT(am(T, x))
Z(x) :=
    V ← [-(A(x)*B(x) - B(x)^2 - B(x)^3); A(x) - 3*B(x)^2 - 2*B(x); -(1 - B(x)); 1]
    ZZ ← polyroots(V)
    for i ∈ 0 .. 2
        (ZZ[i] ← 0) if (Im(ZZ[i]) ≠ 0)
    ZZ ← sort(ZZ)
    ZZ[0] ← ZZ[2] if (|ZZ[0]| < 10^-5)
    ZZ[2] ← ZZ[0] if (|ZZ[2]| < 10^-5)
    ZZ
# Vector of coefficients in the PR equation
# in the form
# 0=-(A*B-B^2-B^3)+(A-3*B^2-2*B)*Z-(1-B)*Z^2+Z^3
# Solution to the cubic
# Set any imaginary roots to zero
# Sort the roots
#
# Set the value of any imaginary roots
# to value of the real root
Z = ƒ([Unitless]) → [Unitless]
# Calculate molar volumes
# kmol/m^3
VL := Z(x)[0]*R*T/P*10^3
VV := Z(x)[2]*R*T/P*10^3
# Fugacity expressions [actually ln(f/P)] for the liquid fl and vapor fv
fl(x, i) := (Z(x)[0] - 1)*b[i]/bm(x) - ln(Z(x)[0] - B(x)) - A(x)/(2*sqrt(2)*B(x))*(2*sum(x[j]*sqrt(a(T, i)*a(T, j))*(1 - k[i, j]), j = 0 .. N - 1)/am(T, x) - b[i]/bm(x))*ln((Z(x)[0] + (1 + sqrt(2))*B(x))/(Z(x)[0] + (1 - sqrt(2))*B(x)))
fv(x, i) := (Z(x)[2] - 1)*b[i]/bm(x) - ln(Z(x)[2] - B(x)) - A(x)/(2*sqrt(2)*B(x))*(2*sum(x[j]*sqrt(a(T, i)*a(T, j))*(1 - k[i, j]), j = 0 .. N - 1)/am(T, x) - b[i]/bm(x))*ln((Z(x)[2] + (1 + sqrt(2))*B(x))/(Z(x)[2] + (1 - sqrt(2))*B(x)))
phil(x, i) := exp(fl(x, i))
phiv(x, i) := exp(fv(x, i))
# Residual entropy for liquid (DELSL) and vapor (DELSV) phases
DELSL := (R*ln(Z[0] - B) + Da/(2*sqrt(2)*bm)*ln((Z[0] + (1 + sqrt(2))*B)/(Z[0] + (1 - sqrt(2))*B)))*10^5  # error: This value must be a scalar.
DELSV := (R*ln(Z[2] - B) + Da/(2*sqrt(2)*bm)*ln((Z[2] + (1 + sqrt(2))*B)/(Z[2] + (1 - sqrt(2))*B)))*10^5  # error: This value must be a scalar.
# Residual enthalpy for liquid (DELHL) and vapor (DELHV) phases
DELHL := (R*T*(Z[0] - 1) + (T*Da - am(T))/(2*sqrt(2)*bm)*ln((Z[0] + (1 + sqrt(2))*B)/(Z[0] + (1 - sqrt(2))*B)))*10^5  # error: This value must be a scalar.
DELHV := (R*T*(Z[2] - 1) + (T*Da - am(T))/(2*sqrt(2)*bm)*ln((Z[2] + (1 + sqrt(2))*B)/(Z[2] + (1 - sqrt(2))*B)))*10^5  # error: This value must be a scalar.
# Ideal gas roperties changes relative to the reference state
# Must define a Trerferene (could be
# feed stream temp) and use the heat
# capacity coefficients defined above
DELHIG := Cpm[1]*(T - Trs) + Cpm[2]*(T^2 - Trs^2)/2 + Cpm[3]*(T^3 - Trs^3)/3 + Cpm[4]*(T^4 - Trs^4)/4
DELSIG := Cpm[1]*ln(T/Trs) + Cpm[2]*(T - Trs) + Cpm[3]*(T^2 - Trs^2)/2 + Cpm[4]*(T^3 - Trs^3)/3 - R*10^5*ln(P/Prs)
DELSIG := DELSIG - R*10^5*sum(x[i]*ln(x[i]), i = 0 .. N - 1)
# Total entropy and enthalpy relative to ideal gas reference state
SL := DELSIG + DELSL
SV := DELSIG + DELSV
HL := DELHIG + DELHL
HV := DELHIG + DELHV
# Plug the H values for both exit streams into energy balancnce, using the flow rates/vapor liquid split and compositions. Find Q
